P_2 := 7.25*10^6
P_а := 0.02*10^6
# 3. Построение газодинамического тракта
I_уп := 3609.98
P_п := 700
F`_кр := 0.0002523
F`_а := 0.0099085
m_р := P_п*10^3/I_уп = 193.907
φ_с := 0.98
F_кр := F`_кр*m_р = 0.0489227
φ_β := 0.98
F_крд := F_кр/φ_с = 0.0499211
φ := φ_с*φ_β = 0.9604
F_а := F`_а*m_р = 1.92133
F_ад := F_а/φ_с^2 = 2.00055
L_пр := 1.5
V_кс := L_пр*F_крд = 0.0748817
d_кс := nthroot(4*V_кс/π, 3) = 0.456838
L_кс := d_кс = 0.456838
R_кр := sqrt(F_крд/π) = 0.126057
D_кр := 2*R_кр = 0.252114
R_а := sqrt(F_ад/π) = 0.797994
R_а*2 = 1.59599
R_с1 := 0.25*d_кс = 0.114209
R_с2 := 0.7*D_кр = 0.17648
R_с3 := 0.45*R_кр = 0.0567257
R_а/R_кр = 6.33042
L_a := 15.5*R_кр = 1.95388
# 5. Расчет смесительной головки
ρ_о := 1135
ρ_г := 416
υ := 3.5504
m_г := m_р/(1 + υ) = 42.6132
m_о := m_р*υ/(1 + υ) = 151.294
# 5.2 Расчет струйных форсунок для пристеночного слоя.
d_кс = 0.456838
ρ_г = 416
m_г = 42.6132
Δp_фг := 1.5*10^6
n_сф := π*(d_кс - 0.016)/0.015 = 92.3288
μ_ф := 0.65
m_сфг := 0.05*m_г/n_сф = 0.0230768
F_сфг := m_сфг/(μ_ф*sqrt(2*Δp_фг*ρ_г)) = 1.00498e-6
ω_г := μ_ф*sqrt(2*Δp_фг/ρ_г) = 55.1985
d_сфг := sqrt(4*F_сфг/π) = 0.00113118
# 5.3 Расчет центробежных форсунок
# 5.3.1. Форсунки горючего
n_цфг := 187
m_цфг := 0.95*m_г/n_цфг = 0.216484
Δp_ф := 2*10^6
μ_ф := 0.42
F_сг := m_цфг/(μ_ф*sqrt(2*Δp_ф*ρ_г)) = 1.26357e-5
A := 1
d_сг := sqrt(4*F_сг/π) = 0.00401102
r_сг := d_сг/2 = 0.00200551
i := 4
R_вх := 2*r_сг = 0.00401102
m_вх := m_цфг/i = 0.054121
Динамическая
r_вх := round(sqrt(R_вх*r_сг/(i*A)), 4) = 0.0014
вязкость
d_вх := 2*r_вх = 0.0028
η := 102.8*10^-6
Re_вх := 4*m_цфг/(η*π*d_вх*sqrt(i)) = 478801
Для_правильной_работы_маткада
lg(λ) := 25.8/log(Re_вх)^2.58 - 2 = -1.70801
λ := 0
λ := 10^lg(λ) = 0.0195881
log(0.02) = -1.69897
A_э := R_вх*r_сг/(i*r_вх^2 + λ/2*R_вх*(R_вх - r_сг)) = 1.01583
|(A - A_э)/A|*100 = 1.58306
l_вх := 1.2*d_вх = 0.00336
l_сг := 0.5*d_сг = 0.00200551
h := R_вх = 0.00401102
R_з := R_вх + r_вх = 0.00541102
R_ф := sqrt(R_з^2 + l_вх^2 + 2*l_вх*sqrt(R_з^2 - R_вх^2)) = 0.00806072
δ := R_ф - R_з = 0.0026497
# 5.3.2. Форсунки окислителя
n_цфо := 424
m_цфо := m_г/n_цфг = 0.227878
m_цфо = 0.227878
ρ_о = 1135
Δp_ф := 2*10^6
μ_ф := 0.42
F_со := m_цфо/(μ_ф*sqrt(2*Δp_ф*ρ_о)) = 8.05239e-6
A := 1
d_со := round(sqrt(4*F_со/π), 3) = 0.003
r_со := d_со/2 = 0.0015
i := 3
R_вх := 2*r_со = 0.003
m_вх := m_цфо/i = 0.0759593
Динамическая
r_вх := round(sqrt(R_вх*r_со/(i*A)), 4) = 0.0012
вязкость
d_вх := 2*r_вх = 0.0024
η := 190*10^-6
Re_вх := 4*m_цфо/(η*π*d_вх*sqrt(i)) = 367356
Для_правильной_работы_маткада
lg(λ) := 25.8/log(Re_вх)^2.58 - 2 = -1.69218
λ := 0
λ := 10^lg(λ) = 0.0203153
A_э := R_вх*r_со/(i*r_вх^2 + λ/2*R_вх*(R_вх - r_со)) = 1.03076
|(A - A_э)/A|*100 = 3.07603
l_вх := 1.2*d_вх = 0.00288
l_со := 0.5*d_со = 0.0015
h := R_вх = 0.003
R_з := R_вх + r_вх = 0.0042
R_ф := sqrt(R_з^2 + l_вх^2 + 2*l_вх*sqrt(R_з^2 - R_вх^2)) = 0.00654716
δ := R_ф - R_з = 0.00234716
